# Title: 555 based SC generator
# Author: Pablo Alías Mateos
# Date: 21/04/2018
# The objective is to use the 555 astable mode to configure the pulse duration of the driving signal used to
# switch ON OFF the logic MOSFET utilized to create a SC.
# [area: General functions]
## Capacitor charge
## Parallel
C*R*(s*Vc - Vc0) + Vc == Vin/s solve, Vc → (Vin + C*R*Vc0*s)/(C*R*s^2 + s)
par(x, y) := x*y/(x + y)
(Vin + C*R*Vc0*s)/(C*R*s^2 + s) invlaplace, s → Vin + Vc0*e^(-t/(C*R)) - Vin*e^(-t/(C*R))
vc_charge(t, R, C, Vin, Vc0) := Vin + Vc0*e^(-t/(C*R)) - Vin*e^(-t/(C*R))
## Capacitor discharge
C*R*(s*Vc - Vc0) + Vc == 0 solve, Vc → C*R*Vc0/(C*R*s + 1)
C*R*Vc0/(C*R*s + 1) invlaplace, s → Vc0*e^(-t/(C*R))
vc_discharge(t, R, C, Vc0) := Vc0*e^(-t/(C*R))
# [area: 01 555 astable]
# See pdf handwritten analysis
## Toff astable mode
## Ton astable mode
vc_discharge(t, R2, C, 2/3*Vcc) == 1/3*Vcc solve, t → C*R2*ln(2)
vc_charge(t, R1 + R2, C, Vcc, 1/3*Vcc) == 2/3*Vcc solve, t → C*ln(2)*(R1 + R2)
toff_astable(C, R2) := C*R2*ln(2)
ton_astable(C, R1, R2) := C*ln(2)*(R1 + R2)
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# [area: 02 555 monostable]
# See pdf handwritten analysis
## Tpulse monostable mode
vc_charge(t, R1 + R2, C, Vcc, 0) == 2/3*Vcc solve, t → C*ln(3)*(R1 + R2)
tpulse_monostable(C, R1, R2) := C*ln(3)*(R1 + R2)
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tpulse_monostable(1*10^-6, 100, 100*10^3*0.9) = 0.098985
tpulse_monostable(1*10^-6, 100, 100*10^3*0.9) = 0.098985
# [area: 03 SC gen design]
# See pdf handwritten analysis
## Ln capacitor compensator
# The objective is to configure the pulse lenght in astable mode by means of a potentiometer. The on time in astable mode is different than the pulse time in monostable mode for the same RC network, therefore must be compensated by placing an extra capacitor in parallel when the circuit is operating in astable mode.
tpulse_monostable(C, R1, R2) == ton_astable(C + Cx, R1, R2) solve, Cx → -(C*ln(2) - C*ln(3))/ln(2)
-(C*ln(2) - C*ln(3))/ln(2) simplify → C*(ln(3)/ln(2) - 1)
C_Ln_compensator(C) := C*(ln(3)/ln(2) - 1)
# This ln factor must be compensated with the capacitor and not by means of R1. This is because trying to compensate by means of R1 leads to an expression that depeneds on R2, and
# R2 is a varaible resistor
# R2 is a 10K potentiometer to cofigure the pulse length inside one range, Therefore:
R2 := [0; 100*10^3]
# Capacitor for the monostable mode
C := 1*10^-6
C_Ln := C_Ln_compensator(C)
C_Ln = 5.84963e-7
C_Ln_design := 33*10^-9 + 220*10^-9 + 330*10^-9  # Commercial component selection
C_Ln_design/C_Ln = 0.996645
# Range 1
tpulse_target_range_1 := 100*10^-6
100/ln(3) = 91.0239
tpulse_monostable(C, R1_rg1, R2[0]) == tpulse_target_range_1 solve, R1_rg1 → 100/ln(3)
R1_1_rg1 := 100  # Commercial component selection
# Range 1 boundaries
t_range := tpulse_monostable(C, R1_1_rg1, R2) = [0.000109861; 0.109971]
t_range = [0.000109861; 0.109971]
ton_astable(C + C_Ln_design, R1_1_rg1, R2) = [0.000109725; 0.109835]
# [area: 04 BJT pnp line switch design]
# When switching between astable and monostable mode, if the transition just coincides with the ON state, a spureous pulse would be generated
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# Therefore the control signal of the associated mux must be delayed
Vcc := [12; 9]
Cdelay_transition := 10*10^-6
ln(10) = 2.30259
n_cycles := 1.5
High_th_min := 5
vc_charge(n_cycles*max(t_range), Rx, Cdelay_transition, max(Vcc), 0) == High_th_min solve, Rx → 30604.3981583
# Thanks to the delay network:
Cdelay_transition*30*10^3*5 = 1.5
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Rdelay_transition := 30*10^3
# Cap used has 20% of tol. The delay time must be higher than 1 cycle in WC
vc_charge(t, Rdelay_transition, Cdelay_transition*0.8, max(Vcc), 0) == High_th_min solve, t → 0.129359160176
0.129359160176/max(t_range) = 1.1763
